# Spædningsdeler for solcelle
9.5 V/(20 mA) = 475 Ω
9.5 V == x/(475 Ω + x)*20 V solve, x → 429.761904762*Ω
# Spædningsdeler for Vindmølle
9.5 V/(20 mA) = 475 Ω
9.5 V == x/(475 Ω + x)*54 V solve, x → 101.404494382*Ω
101.4*Ω/(475 Ω + 101.4*Ω)*26 V = 4.57391 V
# Spædningsdeler for omformer
9.5 V/(20 mA) = 475 Ω
9.5 V == x/(475 Ω + x)*12 V solve, x → 1805.0*Ω = 1.805 kΩ
# Spædningsdeler for batteri sensor
9.5 V/(20 mA) = 475 Ω
9.5 V == x/(475 Ω + x)*12 V solve, x → 1805.0*Ω = 1.805 kΩ
