# Spædningsdeler for solcelle
9.5 V/x == 20 mA solve, x → 0.475*V/mA = 475 Ω
20 mA/(0.018 mA) = 1111.11
9.5 V/(515 kΩ) = 0.0184466 mA
9.5 V == x/(515 kΩ + x)*20 V solve, x → 465.952380952*kΩ
# Spædningsdeler for Vindmølle
9.5 V/(515 kΩ) = 0.0184466 mA
9.5 V == x/(515 kΩ + x)*54 V solve, x → 109.943820225*kΩ
# Spædningsdeler for omformer
9.5 V/(515 kΩ) = 0.0184466 mA
9.5 V == x/(515 kΩ + x)*24 V solve, x → 337.413793103*kΩ
# Spædningsdeler for batteri sensor
9.5 V/(515 kΩ) = 0.0184466 mA
9.5 V == x/(515 kΩ + x)*12 V solve, x → 1957.0*kΩ
